# ProduccionJitomate

Dataset: openLCA process, unit process
Category: CaeTec
Geography: Europe
Allocation method: economic allocation
isCopyrightProtected: false

## General comment
Creación del jitomate de CaeTec

## Parameters
- agua: 1
- fertilizante: 1
- suelo: 1
- electricidad: 1
- plastico_cobertor: 1
- plastico_sujetador_planta: 1
- bolis_coco: 1
- plastico_acolchado: 1
- rafia: 1
- plastico_manguera_riego: 1

## Reference product
- Jitomate: 10 kg

## By-products
- Polietileno: 28 kg
- BioPolietileno: 1 kg

## Inputs from technosphere
- electricity, production mix DE: 1 MJ
- Polietileno: 20 kg
- BioPolietileno: 1 kg

## Inputs from nature
- Water [Emission to air, high population density]: 1 kg
- Soil [Resource, in ground]: 1 kg
- Fertiliser, applied (N component) [Emission to soil, unspecified]: 1 kg

## Allocation factors
- causal, Polietileno, for Soil: 0
- causal, Jitomate, for Water: 1
- economic, Jitomate: 1
- causal, Jitomate, for electricity, production mix DE: 1
- causal, Polietileno, for electricity, production mix DE: 0
- causal, Polietileno, for Water: 0
- causal, Polietileno, for Fertiliser, applied (N component): 0
- physical, Jitomate: 1
- causal, Polietileno, for Polietileno: 0
- physical, Polietileno: 0
- causal, Jitomate, for Polietileno: 1
- causal, Jitomate, for Soil: 1
- causal, Jitomate, for Fertiliser, applied (N component): 1
- economic, Polietileno: 0
- causal, BioPolietileno, for Soil: 0
- causal, BioPolietileno, for Fertiliser, applied (N component): 0
- physical, BioPolietileno: 0
- causal, BioPolietileno, for Water: 0
- causal, BioPolietileno, for electricity, production mix DE: 0
- economic, BioPolietileno: 0
- causal, BioPolietileno, for Polietileno: 0
- causal, BioPolietileno, for BioPolietileno: 0
- causal, Jitomate, for BioPolietileno: 0
- causal, Polietileno, for BioPolietileno: 0
